*Heading
** Job name: Job-10 Model name: Model-1
** Generated by: Abaqus/CAE 2019
*Preprint, echo=NO, model=NO, history=NO, contact=NO
**
** PARTS
**
*Part, name=Beam
*Node
      1,          8.5,       -11.25,          10.
      2,          8.5,        -7.25,          10.
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*Element, type=C3D4
   1, 195, 196, 197, 184
   2, 195, 198, 199, 200
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*Nset, nset=_PickedSet2, internal, generate
   1,  332,    1
*Elset, elset=_PickedSet2, internal, generate
    1,  1304,     1
** Section: Beam_Solid
*Solid Section, elset=_PickedSet2, material=Steel
,
*End Part
**
**
** ASSEMBLY
**
*Assembly, name=Assembly
**
*Instance, name=Beam-1, part=Beam
*End Instance
**
*Nset, nset=_PickedSet4, internal, instance=Beam-1
 1, 2, 5, 8
*Nset, nset=_PickedSet5, internal, instance=Beam-1
   3,   4,   6,   7,  21,  22
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*Elset, elset=_PickedSet5, internal, instance=Beam-1
  269,  271,  528,  537,  724,  725
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*End Assembly
**
** MATERIALS
**
*Material, name=Steel
*Elastic
 2.1e+11, 0.25
**
** BOUNDARY CONDITIONS
**
** Name: BC-Fix Type: Displacement/Rotation
*Boundary
_PickedSet5, 1, 1
_PickedSet5, 2, 2
_PickedSet5, 3, 3
** ----------------------------------------------------------------
**
** STEP: Step-1
**
*Step, name=Step-1, nlgeom=NO
*Static
1., 1., 1e-05, 1.
**
** LOADS
**
** Name: Load-Force   Type: Concentrated force
*Cload
_PickedSet4, 2, -1e+06
**
** OUTPUT REQUESTS
**
*Restart, write, frequency=0
**
** FIELD OUTPUT: F-Output-1
**
*Output, field, variable=PRESELECT
**
** HISTORY OUTPUT: H-Output-1
**
*Output, history, variable=PRESELECT
*End Step
