*Heading
** Job name: Job-1 Model name: Model-1
** Generated by: Abaqus/CAE 6.10-1
*Preprint, echo=NO, model=NO, history=NO, contact=NO
**
** PARTS
**
*Part, name=beam
*Node
      1,          40.,          10.,           5.
      2,           0.,          10.,           5.
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*Element, type=STRI3
 1, 26,  4, 13
 2,  1, 13,  4
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*Nset, nset=_PickedSet5, internal, generate
  1,  63,   1
*Elset, elset=_PickedSet5, internal, generate
  1,  96,   1
** Section: Section-1
*Shell Section, elset=_PickedSet5, material=Material-1
0.25, 5
*End Part
**
**
** ASSEMBLY
**
*Assembly, name=Assembly
**
*Instance, name=beam-1, part=beam
*End Instance
**
*Nset, nset=_PickedSet4, internal, instance=beam-1
  2,  3,  6,  7, 10, 11, 34
*Elset, elset=_PickedSet4, internal, instance=beam-1
 15, 31, 47, 63, 66, 96
*Nset, nset=_PickedSet5, internal, instance=beam-1
 12,
*Nset, nset=_PickedSet6, internal, instance=beam-1
 1,
*End Assembly
**
** MATERIALS
**
*Material, name=Material-1
*Elastic
10000., 0.3
** ----------------------------------------------------------------
**
** STEP: Step-1
**
*Step, name=Step-1
*Static
1., 1., 1e-05, 1.
**
** BOUNDARY CONDITIONS
**
** Name: BC-1 Type: Symmetry/Antisymmetry/Encastre
*Boundary
_PickedSet4, ENCASTRE
**
** LOADS
**
** Name: Load-1   Type: Concentrated force
*Cload
_PickedSet5, 2, 1.6
** Name: Load-2   Type: Concentrated force
*Cload
_PickedSet6, 2, -1.6
**
** OUTPUT REQUESTS
**
*Restart, write, frequency=0
**
** FIELD OUTPUT: F-Output-1
**
*Output, field, variable=PRESELECT
**
** HISTORY OUTPUT: H-Output-1
**
*Output, history, variable=PRESELECT
*End Step
